# AguaClara Water Treatment Plants
# Design References
# MathCAD dimension calculations:
# Variable Naming Guide
# The list below is the list names that can be used before the period for the subscript in our variable names.
# Major Plant Components. These items follow the period in the variable name
# [reference: BasicInputs.xmcd]
Q_Plant := 32*L/s
# [reference: ExpertInputs.xmcd]
# [reference: MathFunctions.xmcd]
# [reference: PipeDatabase.xmcd]
# [reference: FluidsFunctions.xmcd]
# [reference: SedimentationTank.xmcd]
# [reference: Flocculator.xmcd]
# [reference: LFOM.xmcd]
[
    "Subscripts", "";
    "component key", "Description";
    "Et", "Entrance tank";
    "Lfom", "Linear flow orifice meter";
    "Rm", "Rapid mix";
    "Floc", "Flocculation tank";
    "Sed", "Sedimentation tank";
    "Fi", "Stacked Rapid Sand Filter"
]
# [reference: LinearCdc.xmcd]
# [reference: ChemStorageTanks.xmcd]
# [reference: EntranceTank.xmcd]
# [reference: StackedRapidSandFilter.xmcd]
# [reference: DrainChannel.xmcd]
# [reference: MaterialsList.xmcd]
# AutoCAD drawing programs:
# Translators:
# These are the codes that take MathCAD outputs and create AutoCAD scripts that are used to draw the plant (formerly Basics)
# [reference: MtoATranslators.xmcd]
# The wrapped MtoA translator contains the functions that the user will want to access. These functions will draw pieces with full functionality - specifying the location, dimension, and orientation of the object. Also, it contains layer control and subtraction capabilities for grouped objects.
# [reference: MtoATranslatorsWrapped.xmcd]
[
    "Symbol", "Description", "Dimensions";
    "Amp", "amplitude", "L";
    "B", "perpendicular distance between components (center to center)", "L";
    "D", "Diameter", "L";
    "E", "pipe roughness", "L";
    "FB", "Freeboard", "L";
    "H", "height (includes freeboard)", "L";
    "HL", "head loss", "L";
    "HW", "local water depth", "L";
    "ID", "inner diameter", "L";
    "L", "length", "L";
    "Loc", "Locations", "L";
    "ND", "nominal diameter", "L";
    "OD", "outer diameter", "L";
    "R", "Radius", "L";
    "S", "space between components", "L";
    "T", "thickness", "L";
    "W", "width", "L";
    "Z", "elevation relative to bottom of sed tank", "L";
    "ZW", "water depth relative to bottom of sed tank", "L";
    "V", "velocity", "L/T";
    "CP", "Collision Potential", "L^(2/3)";
    "A", "Area", "L^2";
    "Nu", "kinematic viscosity", "L^2/T";
    "ED", "energy dissipation rate", "L^2/T^3";
    "Vol", "volume", "L^3";
    "Q", "flow", "L^3/T";
    "MW", "Molecular weight", "M";
    "C", "Concentration", "M/L^3";
    "Rho", "Density", "M/L^3";
    "AN", "angle", "radians";
    "Ti", "time", "T";
    "EN", "Enumerated type", "dimensionless";
    "N", "Number", "dimensionless";
    "Pi", "dimensionless geometric ratio", "";
    "AC", "AutoCAD command string", "";
    "K", "minor loss coefficient", ""
]
# Plant Elements:
# These are all of the files that draw the fundamental parts of the plants (tees, elbows, tanks, pipes, etc)
# [reference: ChannelF.xmcd]
# [reference: PlumbingF.xmcd]
# [reference: TankF.xmcd]
# [reference: StairsF.xmcd]
# [reference: DrainChannelF.xmcd]
# Specific Pieces:
# These are the codes that draw the bigger pieces of the plant (the sed tank, floc tank, etc)
# [reference: FlocculatorAC.xmcd]
# [reference: SedimentationTankAC.xmcd]
# [reference: EntranceTankAC.xmcd]
# [reference: ChemStockTanksAC.xmcd]
# [reference: StackedRapidSandFilterAC.xmcd]
# [reference: OperatorAccessAC.xmcd]
# [reference: DrainChannelAC.xmcd]
# [reference: CdcAC.xmcd]
# AutoCAD Materials:
# Adds the option of assigning materials to the entire plant design.
# [reference: MaterialsAC.xmcd]
# Layouts:
# This rearranges the plant to optimize the layout
# [reference: PlantLayoutsAC.xmcd]
# This file will execute at the very end to create multiple views of the entire plant in paperspace
# [reference: LayoutsAC.xmcd]
# Sedimentation
# Sed Tanks and Slopes:
N_SedTanks = 3
L_Sed = 6.3275 m
N_SedBays = 2  # Number of bays of inlet manifolds in each sed tank
# Length of the port through which water exits the inlet manifold
# Width of ferrous cement plates in whice one manifold port is cut
Q_SedBay = 5.33333 L/s
# Sedimentation Tank Sludge Drain:
N_SedSludgeOrifices = 48  # per cell
Ti_SludgeDrain = 30 min  # Tank Drain time
W_SedSludge = 9.19761 cm  # Width of the sludge channel
B_SedSludgeOrifices = 11.09 cm  # Distance center to center between drain orifices
# Depth of the sludge channel
H_SedSludge = 9.19761 cm
W_SedDrainCover = 13.1976 cm
D_SedSludgeOrifice = 0.00924124 m  # Diameter of drain orifices
N_SedSludgeOrifices = 48
# Sedimentation Tank Dimensions:
Z_SedSludge = 0.0919761 m  # Height from 0 of the top of the sludge drain
# Height from 0 of the top of the inlet manifold
W_Sed = 2 m
L_Sed = 6.3275 m  # Total tank length
# Inlet Channel:
HW_SedInletChannel = 0.38815 m  # Width of the drop chimneys connecting channel to sed inlet manifolds
W_SedInletChannel = 0.536732 m  # length of drop chimmneys
L_SedChannel = 6.3 m
H_SedInletChannel = 0.48815 m
# Sedimentation Tank Effluent Launder:
N_SedLaunderOrifices = 100  # Number of orifices per launder  # More Launder Dimensions
ND_SedLaunder = 6 in
Q_SedLaunderOrifices = 5.33333e-5 m^3/s
# Center to center launder spacing
L_SedLaunder = 5.20548 m
B_SedLaunderOrifices = 0.1 m
D_SedLaunderOrifice = 0.433071 in
# Exit Channel:
W_SedExitChannel = 0.305569 m
H_SedExitChannel = 0.48815 m
HW_SedExitChannel = 0.34815 m  # water height in exit channel from 0
# Lamella:
L_SedPlate = 1 m  # center to center distance between lamella
B_SedPlate = 2.7 cm  # spacing between lamella
S_SedPlate = 2.5 cm
N_SedPlates = 165  # Number of Sed Plates per Sedimentation Tank Bay.
AN_SedPlate = 60 deg
V_SedC = 5.95972 m/day
L_SedActive = 5.14188 m
V_SedUp = 86.4 m/day
Z_SedLaunder = 2.14146 m
N_SedPlates = 165
HW_Sed = 2.26606 m
H_Sed = 2.38551 m
# Flocculator
# Look at Flocculator Positioning arrays
W_FlocChannel = 0.6 m
# Fill last channel with bafffles from last channel
ED_Floc = 10 mW/kg
# Fix port width to be based on energy dissipation in that channel
# Adjust spacing after the number of baffles per channel is known.
HW_FlocEnd = 2.26606 m
# Check the residence time of the flocculator should be at least 20minutes
X_FlocBaffles = [
    0.303886, 0.303886, 0.303886;
    0.589773, 0.589773, 0.589773;
    0.875659, 0.875659, 0.875659;
    1.16155, 1.16155, 1.16155;
    1.44743, 1.44743, 1.44743;
    1.73332, 1.73332, 1.73332;
    2.0192, 2.0192, 2.0192;
    2.30509, 2.30509, 2.30509;
    2.59098, 2.59098, 2.59098;
    2.87686, 2.87686, 2.87686;
    3.16275, 3.16275, 3.16275;
    3.44864, 3.44864, 3.44864;
    3.73452, 3.73452, 3.73452;
    4.02041, 4.02041, 4.02041;
    4.30629, 4.30629, 4.30629;
    4.59218, 4.59218, 4.59218;
    4.87807, 4.87807, 4.87807;
    5.16395, 5.16395, 5.16395;
    5.44984, 5.44984, 5.44984;
    5.73573, 5.73573, 5.73573;
    6.02161, 6.02161, 0
] m
L_FlocBaffles = [
    1.84023, 1.84023, 2.12417;
    2.12417, 2.12417, 1.84023;
    1.84023, 1.84023, 2.12417;
    2.12417, 2.12417, 1.84023;
    1.84023, 1.84023, 2.12417;
    2.12417, 2.12417, 1.84023;
    1.84023, 1.84023, 2.12417;
    2.12417, 2.12417, 1.84023;
    1.84023, 1.84023, 2.12417;
    2.12417, 2.12417, 1.84023;
    1.84023, 1.84023, 2.12417;
    2.12417, 2.12417, 1.84023;
    1.84023, 1.84023, 2.12417;
    2.12417, 2.12417, 1.84023;
    1.84023, 1.84023, 2.12417;
    2.12417, 2.12417, 1.84023;
    1.84023, 1.84023, 2.12417;
    2.12417, 2.12417, 1.84023;
    1.84023, 1.84023, 2.12417;
    2.12417, 2.12417, 1.84023;
    1.84023, 1.84023, 0
] m
Z_FlocBaffles = [
    0, 0, 0.425829;
    0.425829, 0.425829, 0;
    0, 0, 0.425829;
    0.425829, 0.425829, 0;
    0, 0, 0.425829;
    0.425829, 0.425829, 0;
    0, 0, 0.425829;
    0.425829, 0.425829, 0;
    0, 0, 0.425829;
    0.425829, 0.425829, 0;
    0, 0, 0.425829;
    0.425829, 0.425829, 0;
    0, 0, 0.425829;
    0.425829, 0.425829, 0;
    0, 0, 0.425829;
    0.425829, 0.425829, 0;
    0, 0, 0.425829;
    0.425829, 0.425829, 0;
    0, 0, 0.425829;
    0.425829, 0.425829, 0;
    0, 0, 0
] m
N_FlocChannels = 3
L_FlocTank = 18.9825 m
HL_Floc = 23.3938 cm
HW_FlocStart = 2.5 m
S_FlocBaffle = [28.3886; 28.3886; 28.3886] cm
B_FlocBaffle = [28.5886; 28.5886; 28.5886] cm
N_FlocChannelBaffles = [21; 21; 20]
W_FlocPort = [0.283886; 0.283886; 0.283886] m
HL_FlocChannels = [7.91791; 7.91791; 7.55801] cm
L_FlocBaffleLower = 1.84023 m
L_FlocBaffleUpper = 2.12417 m
H_FlocPort = [0.6; 0.6; 0.6] m
Ti_Floc = 13.4423 min  # residence time of the flocculator
N_FlocBaffles = 62
# Materials List
N_Valves = 6
N_ValveCouplings = 6
N_SedPlatesTotal = 990
N_SedPlatesPerSheet = 3
N_SedPlateSheets = 330
# AutoCAD Scripts
AC_SedTank =  # no stored result
AC_EntranceTank =  # no stored result
AC_FlocTank = [
    "-layer m FlocTankCon"; "c t 132,132,132"; "FlocTankCon"; "  "; "_-view o t _zoom w 0.16,6.29,0 -6.4875,8.71,2.6 _box 0,6.45,0 -6.3275,8.55,2.6 _box 0.15,6.3,-0.15 -6.4775,8.7,2.6 _subtract 0.15,6.3,-0.15  0,6.45,0 "; "_box -6.4775,7.05,0 0.15,7.2,2.6"; "-array l  R 2 1 0.75"; "-group c FlocTankCon y "; "all "; "-layer s 0"
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]
AC_ChemTanks = [
    "-layer m CoagTanks"; "c t 132,132,132"; "CoagTanks"; "  "; "_-view o t"; "_zoom w -8.66115,10.21656,2.03139 -7.86915,11.00856,3.27559"; "_cylinder -8.26515,10.61256,3.26559 0.386 a -9.48935,10.61256,3.26559"; "rotate3d l  y -8.26515,10.61256,3.26559 90"; "-group c CoagTanks y "; "all "
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]
AC_OperatorAccess = [
    "-layer m OpWalkwayCon"; "c t 132,132,132"; "OpWalkwayCon"; "  "; "_-view o f"; "_pline"; "-10.22315,3.26559"; "-9.92315,3.26559"; "-9.92315,3.07013"; "-9.62315,3.07013"
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]
AC_DrainChannel = [
    "-layer m DC"; "c t 214,214,214"; "DC"; "  "; "3dpoly"; "0.2,10.2,1.75289"; "0.2,10.2,1.35067"; "0.2,11.00443,1.35067"; "0.2,11.00443,1.75289"; "0.2,10.2,1.75289 "
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]
AC_Layout = [
    "laythw"; "-layout t AguaClara 0"; "View"; "layout d Layout1"; " d Layout2"; "layout r View"; "TopView"; "layout s TopView"; ".ms"; "z o all "
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]
AC_MatApply = ["-insert MaterialsInsert"; "0,0,0 x 1 1  0"]
AC_Filter =  # no stored result
AC_Cdc = [
    "-layer m Cdc"; "c t 125,0,160"; "Cdc"; "  "; "-insert CdcLeverArmwithReducer.dwg"; "-6.05685,11.20149,2.97779 x 1 1  270"; "-insert CdcLeverArmBracket.dwg"; "-6.4696,11.16949,2.95289 x 1 1  270"; "-insert CdcCht.dwg"; "-7.40295,11.20149,3.07059 x 1 1  90"
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]
# [component: inputs AC_Filter]
